# OpenSim document version 30000
AnalyzeTool P019_model_catelli:
  replace_force_set: false
  force_set_files: cmc_actuators.xml
  results_directory: P019/Visit 2/treadmillRoom/OpenSim/05
  output_precision: 8
  initial_time: -1.364242e-11
  final_time: 29.99
  solve_for_equilibrium_for_auxiliary_states: false
  maximum_number_of_integrator_steps: 20000
  maximum_integrator_step_size: 1
  minimum_integrator_step_size: 1e-8
  integrator_error_tolerance: 1e-5
  external_loads_file: externalForces_run02.xml
  lowpass_cutoff_frequency_for_coordinates: 6
  AnalysisSet Analyses:
    MuscleAnalysis: start_time=-1.364242e-11 end_time=29.99 step_interval=1 in_degrees=true muscle_list=all
        moment_arm_coordinate_list=all compute_moments=false
    ForceReporter: start_time=-1.364242e-11 end_time=29.99 step_interval=1 in_degrees=true
        include_constraint_forces=false
    StatesReporter: start_time=-1.364242e-11 end_time=29.99 step_interval=1 in_degrees=true
