# OpenSim document version 40500
InverseKinematicsTool:
  time_range: 0 1.58
  output_motion_file: C:\OpenSim 4.5\run_02_ik.mot
  marker_file: run_02.trc
  IKTaskSet:
    IKMarkerTask Q_RShoulderTop: apply=true weight=1
    IKMarkerTask Q_LShoulderTop: apply=true weight=1
    IKMarkerTask Q_SpineThoracic2: apply=true weight=1
    IKMarkerTask Q_Chest: apply=true weight=1
    IKMarkerTask Q_RArm: apply=true weight=1
    IKMarkerTask Q_RElbowOut: apply=true weight=1
    IKMarkerTask Q_RElbowIn: apply=true weight=1
    IKMarkerTask Q_RWristIn: apply=true weight=1
    IKMarkerTask Q_RWristOut: apply=true weight=1
    IKMarkerTask Q_LArm: apply=true weight=1
    IKMarkerTask Q_LElbowOut: apply=true weight=1
    IKMarkerTask Q_LElbowIn: apply=true weight=1
    IKMarkerTask Q_LWristIn: apply=true weight=1
    IKMarkerTask Q_LWristOut: apply=true weight=1
    IKMarkerTask Q_WaistRFront: apply=true weight=5
    IKMarkerTask Q_WaistLFront: apply=true weight=5
    IKMarkerTask Q_RSips: apply=true weight=5
    IKMarkerTask Q_LSips: apply=true weight=5
    IKMarkerTask Q_RThighHigh: apply=true weight=1
    IKMarkerTask Q_RThighMedial: apply=true weight=1
    IKMarkerTask Q_RThighLow: apply=true weight=1
    IKMarkerTask Q_RKneeOut: apply=true weight=1
    IKMarkerTask Q_RKneeIn: apply=true weight=1
    IKMarkerTask Q_RShinFrontHigh: apply=true weight=1
    IKMarkerTask Q_RShinSide: apply=true weight=1
    IKMarkerTask Q_RShinFrontLow: apply=true weight=1
    IKMarkerTask Q_RAnkleOut: apply=true weight=1
    IKMarkerTask Q_RAnkleIn: apply=true weight=1
    IKMarkerTask Q_RHeelBack: apply=true weight=1
    IKMarkerTask Q_RForefoot1: apply=true weight=1
    IKMarkerTask Q_RForefoot5: apply=true weight=1
    IKMarkerTask Q_LThighHigh: apply=true weight=1
    IKMarkerTask Q_LThighMedial: apply=true weight=1
    IKMarkerTask Q_LThighLow: apply=true weight=1
    IKMarkerTask Q_LKneeOut: apply=true weight=1
    IKMarkerTask Q_LKneeIn: apply=true weight=1
    IKMarkerTask Q_LShinFrontHigh: apply=true weight=1
    IKMarkerTask Q_LShinSide: apply=true weight=1
    IKMarkerTask Q_LShinFrontLow: apply=true weight=1
    IKMarkerTask Q_LAnkleOut: apply=true weight=1
    IKMarkerTask Q_LAnkleIn: apply=true weight=1
    IKMarkerTask Q_LHeelBack: apply=true weight=1
    IKMarkerTask Q_LForefoot1: apply=true weight=1
    IKMarkerTask Q_LForefoot5: apply=true weight=1
