# OpenSim document version 30000
ScaleTool _model_catelli:
  mass: 75.337 [kg]
  height: -1
  age: -1
  ModelScaler:
    apply: true
    scaling_order: measurements
    time_range: -1 -1
    preserve_mass_distribution: true
    MeasurementSet:
      Measurement Torso X: apply=true
        MarkerPair: markers=(Q_ChestLow Q_SpineThoracic12)
        BodyScale torso: axes=X
      Measurement Torso Y: apply=true
        MarkerPair: markers=(Q_HeadFront Q_WaistBack)
        BodyScale torso: axes=Y
      Measurement Torso Z: apply=true
        MarkerPair: markers=(Q_RShoulderTop Q_LShoulderTop)
        BodyScale torso: axes=Z
      Measurement Humerus Y: apply=true
        MarkerPair: markers=(Q_LShoulderTop Q_LElbowOut)
        MarkerPair: markers=(Q_RShoulderTop Q_RElbowOut)
        BodyScale humerus_r: axes=Y
        BodyScale humerus_l: axes=Y
      Measurement Humerus Z: apply=true
        MarkerPair: markers=(Q_LElbowOut Q_LElbowIn)
        MarkerPair: markers=(Q_RElbowOut Q_RElbowIn)
        BodyScale humerus_r: axes=(X Z)
        BodyScale humerus_l: axes=(X Z)
      Measurement Ulna Y: apply=true
        MarkerPair: markers=(Q_LElbowOut Q_LWristOut)
        MarkerPair: markers=(Q_RElbowOut Q_RWristOut)
        BodyScale ulna_r: axes=Y
        BodyScale radius_r: axes=Y
        BodyScale ulna_l: axes=Y
        BodyScale radius_l: axes=Y
      Measurement Ulna Z: apply=true
        MarkerPair: markers=(Q_LElbowOut Q_LElbowIn)
        MarkerPair: markers=(Q_RElbowOut Q_RElbowIn)
        BodyScale ulna_r: axes=(X Z)
        BodyScale radius_r: axes=(X Z)
        BodyScale ulna_l: axes=(X Z)
        BodyScale radius_l: axes=(X Z)
      Measurement Pelvis X: apply=true
        MarkerPair: markers=(Q_WaistLFront Q_LSips)
        MarkerPair: markers=(Q_WaistRFront Q_RSips)
        BodyScale pelvis: axes=(X Y)
      Measurement Pelvis Z: apply=true
        MarkerPair: markers=(Q_WaistRFront Q_WaistLFront)
        BodyScale pelvis: axes=Z
      Measurement Femur Y: apply=true
        MarkerPair: markers=(Q_WaistLFront Q_LKneeOut)
        MarkerPair: markers=(Q_WaistRFront Q_RKneeOut)
        BodyScale femur_r: axes=Y
        BodyScale femur_l: axes=Y
      Measurement Femur Z: apply=true
        MarkerPair: markers=(Q_LKneeOut Q_LKneeIn)
        MarkerPair: markers=(Q_RKneeOut Q_RKneeIn)
        BodyScale femur_r: axes=(X Z)
        BodyScale femur_l: axes=(X Z)
      Measurement Hand: apply=true
        MarkerPair: markers=(Q_LWristOut Q_LHand2)
        MarkerPair: markers=(Q_RWristOut Q_RHand2)
        BodyScale hand_r: axes=(X Y Z)
        BodyScale hand_l: axes=(X Y Z)
      Measurement Tibia Y: apply=true
        MarkerPair: markers=(Q_LKneeOut Q_LAnkleOut)
        MarkerPair: markers=(Q_RKneeOut Q_RAnkleOut)
        BodyScale tibia_r: axes=Y
        BodyScale tibia_l: axes=Y
      Measurement Tibia Z: apply=true
        MarkerPair: markers=(Q_LAnkleOut Q_RAnkleIn)
        MarkerPair: markers=(Q_LAnkleOut Q_LAnkleIn)
        BodyScale tibia_r: axes=(X Z)
        BodyScale tibia_l: axes=(X Z)
      Measurement Foot Z: apply=true
        MarkerPair: markers=(Q_LAnkleOut Q_LAnkleIn)
        MarkerPair: markers=(Q_RAnkleOut Q_RAnkleIn)
        BodyScale calcn_r: axes=(X Z)
        BodyScale calcn_l: axes=(X Z)
        BodyScale toes_l: axes=Z
      Measurement Foot X: apply=true
        MarkerPair: markers=(Q_LHeelBack Q_LForefoot2)
        MarkerPair: markers=(Q_RHeelBack Q_RForefoot2)
        BodyScale toes_r: axes=X
        BodyScale toes_l: axes=X
      Measurement Foot Y: apply=true
        MarkerPair: markers=(Q_LHeelBack Q_LAnkleOut)
        MarkerPair: markers=(Q_RHeelBack Q_RAnkleOut)
        BodyScale calcn_r: axes=Y
        BodyScale toes_r: axes=(Y Z)
        BodyScale calcn_l: axes=Y
        BodyScale toes_l: axes=Y
      Measurement Tibia Y: apply=false
        MarkerPair: markers=(Q_LKneeOut Q_LAnkleOut)
        MarkerPair: markers=(Q_RKneeOut Q_RAnkleOut)
      Measurement Tibia Z: apply=false
        MarkerPair: markers=(Q_LAnkleOut Q_LAnkleIn)
        MarkerPair: markers=(Q_RAnkleOut Q_RAnkleIn)
  MarkerPlacer:
    apply: true
    time_range: -1 -1
    output_motion_file: E:\Zach\Zach_MSc\Study02\ElaboratedData\out.mot
    output_model_file: E:\Zach\Zach_MSc\Study02\ElaboratedData\out.osim
    output_marker_file: E:\Zach\Zach_MSc\Study02\ElaboratedData\out.sto
    max_marker_movement: -1
    IKTaskSet:
      IKMarkerTask Q_Chest: apply=true weight=1
      IKMarkerTask Q_ChestLow: apply=true weight=1
      IKMarkerTask Q_HeadFront: apply=true weight=1
      IKMarkerTask Q_HeadL: apply=true weight=1
      IKMarkerTask Q_HeadR: apply=true weight=1
      IKMarkerTask Q_SpineThoracic2: apply=true weight=1
      IKMarkerTask Q_SpineThoracic12: apply=true weight=1
      IKMarkerTask Q_WaistRFront: apply=true weight=15
      IKMarkerTask Q_WaistLFront: apply=true weight=15
      IKMarkerTask Q_WaistR: apply=true weight=5
      IKMarkerTask Q_WaistL: apply=true weight=5
      IKMarkerTask Q_RSips: apply=true weight=15
      IKMarkerTask Q_LSips: apply=true weight=15
      IKMarkerTask Q_WaistBack: apply=true weight=5
      IKMarkerTask Q_RThighHigh: apply=true weight=5
      IKMarkerTask Q_RThighMedial: apply=true weight=5
      IKMarkerTask Q_RThighLow: apply=true weight=5
      IKMarkerTask Q_RKneeOut: apply=true weight=15
      IKMarkerTask Q_RKneeIn: apply=true weight=15
      IKMarkerTask Q_LThighHigh: apply=true weight=5
      IKMarkerTask Q_LThighMedial: apply=true weight=5
      IKMarkerTask Q_LThighLow: apply=true weight=5
      IKMarkerTask Q_LKneeOut: apply=true weight=15
      IKMarkerTask Q_LKneeIn: apply=true weight=15
      IKMarkerTask Q_RShinFrontHigh: apply=true weight=5
      IKMarkerTask Q_RShinSide: apply=true weight=5
      IKMarkerTask Q_RShinFrontLow: apply=true weight=5
      IKMarkerTask Q_LShinFrontHigh: apply=true weight=5
      IKMarkerTask Q_LShinSide: apply=true weight=5
      IKMarkerTask Q_LShinFrontLow: apply=true weight=5
      IKMarkerTask Q_RAnkleOut: apply=true weight=15
      IKMarkerTask Q_RAnkleIn: apply=true weight=15
      IKMarkerTask Q_LAnkleOut: apply=true weight=15
      IKMarkerTask Q_LAnkleIn: apply=true weight=15
      IKMarkerTask Q_RHeelBack: apply=true weight=1
      IKMarkerTask Q_RForefoot1: apply=true weight=1
      IKMarkerTask Q_RForefoot2: apply=true weight=1
      IKMarkerTask Q_RForefoot5: apply=true weight=1
      IKMarkerTask Q_LHeelBack: apply=true weight=1
      IKMarkerTask Q_LForefoot1: apply=true weight=1
      IKMarkerTask Q_LForefoot2: apply=true weight=1
      IKMarkerTask Q_LForefoot5: apply=true weight=1
      IKMarkerTask Q_RShoulderTop: apply=true weight=1
      IKMarkerTask Q_LShoulderTop: apply=true weight=1
      IKMarkerTask Q_RArm: apply=true weight=1
      IKMarkerTask Q_LArm: apply=true weight=1
      IKMarkerTask Q_RElbowOut: apply=true weight=1
      IKMarkerTask Q_RElbowIn: apply=true weight=1
      IKMarkerTask Q_LElbowOut: apply=true weight=1
      IKMarkerTask Q_LElbowIn: apply=true weight=1
      IKMarkerTask Q_RWristIn: apply=true weight=1
      IKMarkerTask Q_RWristOut: apply=true weight=1
      IKMarkerTask Q_LWristIn: apply=true weight=1
      IKMarkerTask Q_LWristOut: apply=true weight=1
      IKMarkerTask Q_RHand2: apply=true weight=1
      IKMarkerTask Q_LHand2: apply=true weight=1
