# OpenSim document version 30000
MarkerSet:
  Marker Q_Chest: torso (0.04 0.38 0)
  Marker Q_ChestLow: torso (0.1 0.22 0)
  Marker Q_HeadFront: torso (0.093 0.6 0)
  Marker Q_HeadL: torso (0.02 0.58 -0.081)
  Marker Q_HeadR: torso (0.02 0.58 0.081)
  Marker Q_SpineThoracic2: torso (-0.09 0.37 0)
  Marker Q_SpineThoracic12: torso (-0.085 0.14 0)
  Marker Q_WaistRFront: pelvis (0.00953047 0.0180816 0.128464)
  Marker Q_WaistLFront: pelvis (0.00953047 0.0180816 -0.128464)
  Marker Q_WaistR: pelvis (-0.06 0.05 0.14)
  Marker Q_WaistL: pelvis (-0.06 0.05 -0.14)
  Marker Q_RSips: pelvis (-0.155 0.035 0.045)
  Marker Q_LSips: pelvis (-0.155 0.035 -0.045)
  Marker Q_WaistBack: pelvis (-0.155 -0.005 0)
  Marker Q_RThighHigh: femur_r (0.078 -0.15 0)
  Marker Q_RThighMedial: femur_r (0.05 -0.23 -0.03)
  Marker Q_RThighLow: femur_r (0.078 -0.33 0)
  Marker Q_RKneeOut: femur_r (0 -0.404 0.05)
  Marker Q_RKneeIn: femur_r (0 -0.404 -0.05)
  Marker Q_LThighHigh: femur_l (0.078 -0.15 0)
  Marker Q_LThighMedial: femur_l (0.05 -0.23 0.03)
  Marker Q_LThighLow: femur_l (0.078 -0.33 0)
  Marker Q_LKneeOut: femur_l (0 -0.404 -0.05)
  Marker Q_LKneeIn: femur_l (0 -0.404 0.05)
  Marker Q_RShinFrontHigh: tibia_r (0.06 -0.07 0.005)
  Marker Q_RShinSide: tibia_r (0 -0.2 0.04)
  Marker Q_RShinFrontLow: tibia_r (0.04 -0.295236 0.005)
  Marker Q_LShinFrontHigh: tibia_l (0.06 -0.07 -0.005)
  Marker Q_LShinSide: tibia_l (0 -0.2 -0.04)
  Marker Q_LShinFrontLow: tibia_l (0.04 -0.295236 -0.005)
  Marker Q_RAnkleOut: tibia_r (-0.005 -0.3888 0.053)
  Marker Q_RAnkleIn: tibia_r (0.006 -0.3888 -0.038)
  Marker Q_LAnkleOut: tibia_l (-0.005 -0.3888 -0.053)
  Marker Q_LAnkleIn: tibia_l (0.006 -0.3888 0.038)
  Marker Q_RHeelBack: calcn_r (-0.025 0.02 -0.005)
  Marker Q_RForefoot1: calcn_r (0.17 0.0297308 -0.03)
  Marker Q_RForefoot2: calcn_r (0.19 0.0297308 0)
  Marker Q_RForefoot5: calcn_r (0.145 0.02491 0.059)
  Marker Q_LHeelBack: calcn_l (-0.025 0.02 0.005)
  Marker Q_LForefoot1: calcn_l (0.17 0.0297308 0.03)
  Marker Q_LForefoot2: calcn_l (0.19 0.0297308 0)
  Marker Q_LForefoot5: calcn_l (0.145 0.02491 -0.059)
  Marker Q_RShoulderTop: torso (-0.003 0.425 0.13)
  Marker Q_LShoulderTop: torso (-0.003 0.425 -0.13)
  Marker Q_RArm: humerus_r (-0.025 -0.13 0)
  Marker Q_LArm: humerus_l (-0.025 -0.13 0)
  Marker Q_RElbowOut: humerus_r (0.015 -0.28 0.04)
  Marker Q_RElbowIn: humerus_r (0.00225 -0.286 -0.046)
  Marker Q_LElbowOut: humerus_l (0.015 -0.28 -0.04)
  Marker Q_LElbowIn: humerus_l (0.00225005 -0.286 0.046)
  Marker Q_RWristIn: radius_r (0.0005 -0.225 0.05)
  Marker Q_RWristOut: radius_r (-0.022 -0.225 -0.022)
  Marker Q_LWristIn: radius_l (0.0005 -0.225 -0.05)
  Marker Q_LWristOut: radius_l (-0.022 -0.225 0.022)
  Marker Q_RHand2: hand_r (-0.015 -0.08 0.02)
  Marker Q_LHand2: hand_l (-0.015 -0.08 -0.02)
